// SBML level 2 version 4

function Constant_flux__irreversible(v)
  v;
end
Constant_flux__irreversible is "Constant flux (irreversible)";

model New_Model()

  // Compartments:
  compartment compartment = 1;

  // Species:
  species mRNA in compartment = 1;
  species Protein in compartment = 1;

  // Reactions:
  R_1: => mRNA; compartment*Constant_flux__irreversible(v);
    v = 20;
  R_2: mRNA => ; compartment*R_2_k1*mRNA;
    R_2_k1 = 10;
  R_3: mRNA => mRNA + Protein; compartment*R_3_k1*mRNA;
    R_3_k1 = 25;
  R_4: Protein => ; compartment*R_4_k1*Protein;
    R_4_k1 = 1;

  // Unit definitions:
  unit volume = 1e-3 litre;
  unit substance = 1e-3 mole;
end
