// SBML level 2 version 4

model Wang2010()

  // Compartments:
  compartment unnamed = 1;

  // Species:
  species DNA in unnamed = 200/unnamed;
  species P2 in unnamed = 0;
  species DNAP2 in unnamed = 0;
  species RNA in unnamed = 0;
  species P in unnamed = 0;

  // Parameters:
  k1 = 0.1;
  k2 = 0.7;
  k3 = 0.35;
  k4 = 0.3;
  k5 = 0.1;
  k6 = 0.9;
  k7 = 0.2;
  k8 = 0.1;

  // Reactions:
  R1: DNA + P2 => DNAP2; k1*DNA*P2;
  R2: DNAP2 => DNA + P2; k2*DNAP2;
  R3: DNA => DNA + RNA; k3*DNA;
  R4: RNA => ; k4*RNA;
  R5: 2 P => P2; k5*P * P;
  R6: P2 => 2 P; k6*P2;
  R7: RNA => RNA + P; k7*RNA;
  R8: P => ; k8*P;
end
